# OpenSim document version 40500
InverseKinematicsTool:
  results_directory: ./
  model_file: ../S00_Demo_Session/S00_P00_SingleParticipant/S00_P00_OpenSim/Model_Pose2Sim_S00_P00_halpe26_scaled.osim
  constraint_weight: Inf
  accuracy: 1e-5
  time_range: 0.01666667 1.633333
  output_motion_file: ../Demo_SinglePerson/pose-3d/S01_Demo_SingleTrial_0-99_filt_butterworth.mot
  report_errors: true
  marker_file: ../Demo_SinglePerson/pose-3d/S01_Demo_SingleTrial_0-99_filt_butterworth.trc
  report_marker_locations: false
  IKTaskSet:
    IKMarkerTask Nose: apply=false weight=0.1
    IKMarkerTask Head: apply=false weight=0.1
    IKMarkerTask Neck: apply=false weight=0.2
    IKMarkerTask LShoulder: apply=true weight=2
    IKMarkerTask RShoulder: apply=true weight=2
    IKMarkerTask LElbow: apply=true weight=1
    IKMarkerTask RElbow: apply=true weight=1
    IKMarkerTask LWrist: apply=true weight=1
    IKMarkerTask RWrist: apply=true weight=1
    IKMarkerTask Hip: apply=true weight=1
    IKMarkerTask LHip: apply=true weight=2
    IKMarkerTask RHip: apply=true weight=2
    IKMarkerTask LKnee: apply=true weight=1
    IKMarkerTask RKnee: apply=true weight=1
    IKMarkerTask LAnkle: apply=true weight=1
    IKMarkerTask RAnkle: apply=true weight=1
    IKMarkerTask LBigToe: apply=true weight=1
    IKMarkerTask LSmallToe: apply=true weight=1
    IKMarkerTask LHeel: apply=true weight=1
    IKMarkerTask RBigToe: apply=true weight=1
    IKMarkerTask RSmallToe: apply=true weight=1
    IKMarkerTask RHeel: apply=true weight=1
    IKCoordinateTask L5_S1_Flex_Ext: apply=true weight=1 value_type=default_value value=0
